// COMSOL Multiphysics 6.3.0.290 model "work.mph"
// Outline of the model tree

Parameters
  p = 3[um]
  dc = 0.4[um]
  d1 = 0.4[um]
  d = 1.05[um]
  tg = 0.04[um]
  ti = 0.006[um]
  t_PML = 1[um]
  R_inner = 8[um]
  h_cut = 5[um]
  R_middle = 9.5[um]
  R_PML = R_middle+t_PML
  W_cut = sqrt(R_inner^2 - (h_cut)^2)
  lda = 0.620[um]
  na = 1.352
  W_box = W_cut+1[um]
  n_silica = sqrt(1 + (0.6961663*lda_um^2)/(lda_um^2 - 0.00467915) + (0.4079426*lda_um^2)/(lda_um^2 - 0.01351206) + (0.8974794*lda_um^2)/(lda_um^2 - 97.9340024))
  lda_um = lda/(1[um])

Variables
  var1 "Variables 1"
    P_fraction = intop1(ewfd.Poavz) / intop2(ewfd.Poavz)

Selections
  disk1: Disk "core_region_arrow" | entitydim = 2; r = 2

Couplings
  maxop1: Maximum on all domains

Geometry
  geom1 "Geometry 1" (2D, length unit µm)
    c3: Circle | r = d/2; pos = {2*p, 0}
    c5: Circle | r = d/2; pos = {-2*p, 0}
    c6: Circle (disabled) | r = d/2; pos = {sqrt(3)*p*cos(30*pi/180), sqrt(3)*p*sin(30*pi/180)}
    c9: Circle (disabled) | r = d/2; pos = {sqrt(3)*p*cos(150*pi/180), sqrt(3)*p*sin(150*pi/180)}
    c10: Circle | r = d/2; pos = {sqrt(3)*p*cos(-30*pi/180), sqrt(3)*p*sin(-30*pi/180)}
    c13: Circle | r = d/2; pos = {sqrt(3)*p*cos(-150*pi/180), sqrt(3)*p*sin(-150*pi/180)}
    c14: Circle | r = d/2; pos = {2*p*cos(-60*pi/180), 2*p*sin(-60*pi/180)}
    c15: Circle | r = d/2; pos = {sqrt(3)*p*cos(-90*pi/180), sqrt(3)*p*sin(-90*pi/180)}
    c16: Circle | r = d/2; pos = {2*p*cos(-120*pi/180), 2*p*sin(-120*pi/180)}
    c17: Circle | r = R_inner
    c18: Circle | r = R_middle
    c19: Circle | r = R_PML; layername = Layer 1; layer = t_PML; layernameold = Layer 1; iscircularsectorold = on
    r1: Rectangle | size = {2*R_PML, R_PML}; pos = {-R_PML, h_cut}
    dif1: Difference | input = c17; input2 = r1
    r2: Rectangle "ti_layer" | size = {2*W_cut, ti}; pos = {-W_cut, h_cut}
    r3: Rectangle "gold_layer" | size = {2 * W_cut, tg}; pos = {-W_cut, h_cut+ti}
    fin: Finalize "Form Union"

Materials
  mat1: Common "Fused silica" on domains 5
    RefractiveIndex: RefractiveIndex
      n = sqrt(1+(0.6961663*lda_um^2)/(lda_um^2-0.00467915)+(0.4079426*lda_um^2)/(lda_um^2-0.01351206)+(0.8974794*lda_um^2)/(lda_um^2-97.9340024))
      ki = 0
  mat2: Common "TiO2" on domains 4
    RefractiveIndex: RefractiveIndex
      n = sqrt(5.913+(0.2441)/(lda_um^2-0.0803))
      ki = 0
  mat3: Common "Au (Gold) (Johnson and Christy 1972: n,k 0.188-1.937 um)" on domains 6
    RefractiveIndex: RefractiveIndex
      n = nr(c_const/freq)
      ki = ni(c_const/freq)
      int1: Interpolation
        funcnametable = {int1, 1}
        funcname = nr
        table = 
          {0.1879, 1.28}
          {0.1916, 1.32}
          {0.1953, 1.34}
          {0.1993, 1.33}
          {0.2033, 1.33}
          {0.2073, 1.30}
          {0.2119, 1.30}
          {0.2164, 1.30}
          {0.2214, 1.30}
          {0.2262, 1.31}
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        fununit = 1
        argunit = um
      int2: Interpolation
        funcnametable = {int2, 1}
        funcname = ni
        table = 
          {0.1879, 1.188}
          {0.1916, 1.203}
          {0.1953, 1.226}
          {0.1993, 1.251}
          {0.2033, 1.277}
          {0.2073, 1.304}
          {0.2119, 1.350}
          {0.2164, 1.387}
          {0.2214, 1.427}
          {0.2262, 1.460}
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        fununit = 1
        argunit = um
  mat4: Common "air" on domains 9-15
    RefractiveIndex: RefractiveIndex
      n = 1
      ki = 0
  mat5: Common "analyte" on domains 1-3, 7, 8
    RefractiveIndex: RefractiveIndex
      n = na
      ki = 0

Physics
  ewfd: ElectromagneticWavesFrequencyDomain on all domains
    dependent variable E = {Ex, Ey, Ez}
    wee1: WaveEquationElectric (default)
      DisplacementFieldModel = RefractiveIndex
      multiphysics = The Semiconductor Electromagnetic Waves multiphysics coupling adds additional contributions to the optical properties
      omega1 = 10^5
      omega2 = 10^12
      deltaEpsilon = 1
      epsilonInf = 1
      ConstitutiveRelationH = RelativePermeability
    pec1: PerfectElectricConductor (default)
      constraintOptions = pointwiseConstraints
      constraintType = symmetricConstraint
      constraintMethod = elemental
    init1: init "Initial Values 1" (default)

Mesh
  mesh1 "Mesh 1" (physics-controlled)
    size: MeshSizeDefault | hauto = 4

Studies
  std1 "Study 1"
    param: Parametric "wavelength sweep" | pname = lda; plistarr = range(550[nm],5[nm],700[nm]); punit = nm
    mode: ModeAnalysis | ftplistmethod = manual; modeFreq = c_const/lda; shift = n_silica; linpsolnum = auto; neigs = 6

Solver configurations
  sol1 "Solution 1" (study std1)
    v1: Variables "Dependent Variables 1"
    e1: Eigenvalue "Eigenvalue Solver 1"
      d1: Direct "Suggested Direct Solver (ewfd)"